OpenVSP model (file version 5), 9 components.
Geometry view with OpenVSP parameter names; values to 6 digits, angles in degrees, lengths in the model's unit.
Overall bounding box: X_Min=-1.52174 X_Len=10.0963 Y_Min=-6.01235 Y_Len=12.0247 Z_Min=-1.12766 Z_Len=3.10532

Fuselage "FuselageGeom"
  location (X Y Z) 0 0 0, rotation 0 0 0
  bounding box size 6.05423 1.5 1.5
  Design: Length=6
  cross sections:
    n  XLocPercent  YLocPercent  ZLocPercent  shape
    0  0            0            -0.06        circle Circle_Diameter=0.252101
    1  0.182432     0            0            ellipse Ellipse_Height=1.5 Ellipse_Width=1.5
    2  0.375        0            0            as above
    3  0.5          0            0            as above
    4  0.636824     0            0            as above
    5  0.721893     0            0            as above
    6  1            0            0.058        circle Circle_Diameter=0.5
    7  1            0            0.058        as above

Wing "wing"
  location (X Y Z) 1.721 0 0.655738, rotation 0 0 0
  symmetric about XZ
  bounding box size 1.8042 12.0247 0.258116
  totals: TotalSpan=12.0247 TotalProjectedSpan=12.0247 TotalChord=1.62 TotalArea=19.48 TotalAR=7.42265
  root: chord 1.8, twist 4, NACA 4-series Camber=0.0361314 CamberLoc=0.394891 ThickChord=0.12044
  sections:
    n  Span     Root_Chord  Tip_Chord  Area  Sweep  Sweep_Location  Dihedral  Twist  Twist_Location  tip airfoil
    1  6.01235  1.8         1.44       9.74  3.5    0               0         4      0.25            NACA 4-series Camber=0.0361314 CamberLoc=0.394891 ThickChord=0.120438

Pod "PodGeom", child of "wing"
  location (X Y Z) -1.52174 3 0.45, rotation 0 0 0
  symmetric about XZ
  bounding box size 10 6.26667 0.266667
  Design: FineRatio=75 Length=10

Wing "VT", child of "PodGeom"
  location (X Y Z) 7.15 3 0.45, rotation 90 0 0
  symmetric about XZ
  bounding box size 1.08092 6.10706 1.16
  totals: TotalSpan=2.32 TotalProjectedSpan=2.32 TotalChord=0.805 TotalArea=1.8676 TotalAR=2.88199
  root: chord 1.07, twist 0, NACA 4-series Camber=0 CamberLoc=0.2 ThickChord=0.1
  sections:
    n  Span  Root_Chord  Tip_Chord  Area    Sweep  Sweep_Location  Dihedral  Twist  Twist_Location  tip airfoil
    1  1.16  1.07        0.54       0.9338  25     0               0         0      0.25            as above

Propeller "cruise_prop1"
  location (X Y Z) 6.2459 0 0.35, rotation -180 0 -180
  bounding box size 0.146604 2.95532 2.95532
  Design: Diameter=2.95 NumBlade=4 Beta34=20 UseBeta34Flag=1 Feather=0 Rotate=0 Precone=0 ReverseFlag=0 FoldAngle=0 PropMode=0 AF=151.14 CLi=0.536968 Chord=0.177656 Solidity=0.226199 ConstructXoC=0.5 FeatherAxisXoC=0.5 FeatherOffsetXoC=0
  cross sections:
    n  RadiusFrac  shape
    0  0.2         airfoil file "Clark Y"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 BaseThickChord=0.117018 Chord=0.118 Invert=1 ThickChord=0.5
    1  0.4         NACA 16-series Chord=0.245219 IdealCl=0.7 ThickChord=0.144074
    2  1           NACA 16-series Chord=0.19175 IdealCl=0.2 ThickChord=0.03
  Chord along r/R (cubic Bezier): 0.2: 0.08, 0.333333: 0.15, 0.466667: 0.2, 0.6: 0.2, 0.716667: 0.2, 0.833333: 0.2, 0.95: 0.2, 0.966667: 0.2, 0.983333: 0.2, 1: 0.13
  Twist along r/R (PCHIP): 0.2: 46.75, 0.75: 20, 1: 13
  Thick along r/R (cubic Bezier): 0.2: 0.5, 0.233333: 0.3, 0.266667: 0.225, 0.3: 0.2, 0.4: 0.125, 0.5: 0.115, 0.6: 0.1, 0.733333: 0.075, 0.866667: 0.055, 1: 0.03
  CLI along r/R (cubic Bezier): 0.2: 0, 0.266667: 0.7, 0.333333: 0.7, 0.4: 0.7, 0.466667: 0.7, 0.533333: 0.7, 0.6: 0.7, 0.733333: 0.7, 0.866667: 0.7, 1: 0.2

Propeller "cruise_prop1", child of "cruise_prop1"
  location (X Y Z) 8.5 3 0.5, rotation -180 0 -180; relative location 8.5 3 0.5, rotation 0 180 0
  symmetric about XZ
  bounding box size 0.146604 8.95532 2.95532
  Design: Diameter=2.95 NumBlade=4 Beta34=20 UseBeta34Flag=1 Feather=0 Rotate=0 Precone=0 ReverseFlag=0 FoldAngle=0 PropMode=0 AF=151.14 CLi=0.536968 Chord=0.177656 Solidity=0.226199 ConstructXoC=0.5 FeatherAxisXoC=0.5 FeatherOffsetXoC=0
  cross sections:
    n  RadiusFrac  shape
    0  0.2         airfoil file "Clark Y"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 BaseThickChord=0.117018 Chord=0.118 Invert=1 ThickChord=0.5
    1  0.4         NACA 16-series Chord=0.245219 IdealCl=0.7 ThickChord=0.144074
    2  1           NACA 16-series Chord=0.19175 IdealCl=0.2 ThickChord=0.03
  blade curves as in "cruise_prop1"

Propeller "PropGeom"
  location (X Y Z) 0 3 0.7, rotation 0 -90 0
  symmetric about XZ
  bounding box size 2.95532 8.95532 0.151253
  Design: Diameter=2.95 NumBlade=4 Beta34=20 UseBeta34Flag=1 Feather=0 Rotate=0 Precone=0 ReverseFlag=0 FoldAngle=0 PropMode=0 AF=151.538 CLi=0.538798 Chord=0.177656 Solidity=0.226199 ConstructXoC=0.5 FeatherAxisXoC=0.5 FeatherOffsetXoC=0
  cross sections:
    n  RadiusFrac  shape
    0  0.2         ellipse Ellipse_Height=0.059 Ellipse_Width=0.118
    1  0.200001    airfoil file "Clark Y"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 BaseThickChord=0.117018 Chord=0.118001 ThickChord=0.499994
    2  1           NACA 16-series Chord=0.19175 IdealCl=0.2 ThickChord=0.03
  Chord along r/R (cubic Bezier): 0.2: 0.08, 0.333333: 0.15, 0.466667: 0.2, 0.6: 0.2, 0.716667: 0.2, 0.833333: 0.2, 0.95: 0.2, 0.966667: 0.2, 0.983333: 0.2, 1: 0.13
  Twist along r/R (PCHIP): 0.2: 46.75, 0.5: 30.2244, 0.75: 20, 1: 13
  Thick along r/R (cubic Bezier): 0.2: 0.5, 0.233333: 0.3, 0.266667: 0.225, 0.3: 0.2, 0.4: 0.125, 0.5: 0.115, 0.6: 0.1, 0.733333: 0.075, 0.866667: 0.055, 1: 0.03
  CLI along r/R (cubic Bezier): 0.2: 0, 0.266667: 0.7, 0.333333: 0.7, 0.4: 0.7, 0.466667: 0.7, 0.533333: 0.7, 0.6: 0.7, 0.733333: 0.7, 0.866667: 0.7, 1: 0.2

Propeller "PropGeom", child of "PropGeom"
  location (X Y Z) 5.4918 3 0.7, rotation 0 -90 0
  symmetric about XZ
  bounding box size 2.95532 8.95532 0.146604
  Design: Diameter=2.95 NumBlade=4 Beta34=20 UseBeta34Flag=1 Feather=0 Rotate=0 Precone=0 ReverseFlag=0 FoldAngle=0 PropMode=0 AF=151.538 CLi=0.538798 Chord=0.177656 Solidity=0.226199 ConstructXoC=0.5 FeatherAxisXoC=0.5 FeatherOffsetXoC=0
  cross sections:
    n  RadiusFrac  shape
    0  0.2         airfoil file "Clark Y"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 BaseThickChord=0.117018 Chord=0.118 ThickChord=0.5
    1  0.4         NACA 16-series Chord=0.245219 IdealCl=0.7 ThickChord=0.144074
    2  1           NACA 16-series Chord=0.19175 IdealCl=0.2 ThickChord=0.03
  blade curves as in "cruise_prop1"

Wing "HT"
  location (X Y Z) 7.7 0 1.6, rotation 0 0 0
  symmetric about XZ
  bounding box size 0.54 6 0.0540313
  totals: TotalSpan=6 TotalProjectedSpan=6 TotalChord=0.54 TotalArea=3.24 TotalAR=11.1111
  root: chord 0.54, twist 0, NACA 4-series Camber=0 CamberLoc=0.2 ThickChord=0.1
  sections:
    n  Span  Root_Chord  Tip_Chord  Area  Sweep  Sweep_Location  Dihedral  Twist  Twist_Location  tip airfoil
    1  3     0.54        0.54       1.62  0      0               0         0      0.25            as above

VSPAERO settings: Sref=19.54 bref=11.9951 cref=1.629 Xcg=3.12511 Ycg=4.35653e-06 Zcg=0.249628 AlphaStart=0 AlphaEnd=0 AlphaNpts=3 BetaStart=0 BetaEnd=0 BetaNpts=1 MachStart=0.163399 MachEnd=0 MachNpts=1 ReCref=1e+07 Vinf=100 Rho=0.002377
